<?xml version="1.0"?>
<!--
	File:     JT3D.xml
	Author:   Aero-Matic v 0.82

	Inputs:
		name:           JT3D-7
		type:           turbine
		thrust:         18000 lb
		augmented?      no
		injected?       no
	-->

<turbine_engine name="JT3D-7">
	<milthrust>   19000 </milthrust>
	<bypassratio> 1.000</bypassratio>
	<tsfc>        0.52 </tsfc>
	<idlen1>      25.0 </idlen1>
	<idlen2>      58.0 </idlen2>
	<maxn1>      106.5 </maxn1>
	<maxn2>      101.4 </maxn2>
	<augmented>      0 </augmented>
	<injected>       1 </injected>

	<function name="IdleThrust">
		<table>
			<independentVar lookup="row">velocities/mach</independentVar>
			<independentVar lookup="column">atmosphere/density-altitude</independentVar>
			<tableData>
			         -10000     0     10000   20000   30000   40000   50000   60000
			     0.0  0.0430  0.0488  0.0528  0.0694  0.0899  0.1183  0.1467  0
			     0.2  0.0500  0.0501  0.0335  0.0544  0.0797  0.1049  0.1342  0
			     0.4  0.0040  0.0047  0.0020  0.0272  0.0595  0.0891  0.1203  0
			     0.6  0.0     0.0     0.0     0.0     0.0276  0.0718  0.1073  0
			     0.8  0.0     0.0     0.0     0.0     0.0474  0.0868  0.0900  0
			     1.0  0.0     0.0     0.0     0.0     0.0     0.0552  0.0800  0
			</tableData>
		</table>
	</function>

	<function name="MilThrust">
		<table>
			<independentVar lookup="row">velocities/mach</independentVar>
			<independentVar lookup="column">atmosphere/density-altitude</independentVar>
			<tableData>
			          -10000       0   10000   20000   30000   40000   50000   60000
			     0.0   1.2600  1.1000  0.9400  0.6340  0.5720  0.3410  0.1490  0
			     0.2   1.1710  1.0340  0.8970  0.6060  0.5550  0.3310  0.1430  0
			     0.4   1.1500  1.0210  0.8920  0.6060  0.5570  0.3330  0.1450  0
			     0.6   1.1810  1.0510  0.9210  0.6320  0.5780  0.3480  0.1540  0
			     0.8   1.2580  1.1200  0.9820  0.6820  0.6170  0.3750  0.1700  0
			     1.0   1.3690  1.2200  1.0710  0.7510  0.6750  0.4150  0.1950  0
			     1.2   1.4850  1.3300  1.1750  0.8440  0.7450  0.5640  0.2250  0
			     1.4   1.5941  1.4400  1.2860  0.9450  0.8280  0.5240  0.2630  0
			</tableData>
		</table>
	</function>

</turbine_engine>
